// SBML level 2 version 4

model TNF_Model_TNF_TPL()
  // This is the code for paper titled
  // SBML model exported from PottersWheel on 2022-09-06 16:53:30.
  // % PottersWheel model definition file
  // function m = TNF_Model_TNF_TPL()
  // m = pwGetEmptyModel();
  // %% Meta information
  // m.name = 'This is the code for paper titled "Modulation of signaling cross-talk between pJNK and pAKT generates optimal apoptotic response"';
  // m.description = 'This file can be mapped with "Data-file-for-fitting-TNF-TPL", for details see read me file';
  // m.authors = {'Sharmila Biswas, Baishakhi Tikader, Sandip Kar, Ganesh Viswanathan; This code has been generated by Baishakhi Tikader'};
  // m.dates = {'2019-12-09'};
  // m.modelFormat = 3;
  // %% Default sampling time points
  // m.t = 0:10:200;
  // %% X - Dynamic variables
  // % m = pwAddX(m, *ID, *startValue, fitSetting, minValue, maxValue, unit, compartment, name, description, typeOfStartValue, designerProps, classname)
  // m = pwAddX(m, 'pJNK' , 1, 'fix', [], [], [], 'C1', [] , [] , [] , [600 70 0 100 40 0 0 1 0 0 1 1] , 'protein.generic');
  // m = pwAddX(m, 'C1Pa' , 0, 'fix', 0, [], [], 'C1', [] , [] , [] , [1119.61524227066 970 0 100 40 1 0.333333333333333 0 0 0 1 1] , 'protein.generic');
  // m = pwAddX(m, 'pAKT' , 1, 'fix', 0, [], [], 'C1', [] , [] , [] , [80.3847577293369 970 0 100 40 0 0 0 0 0 1 1] , 'protein.generic');
  // m = pwAddX(m, 'JNKT' , 10, 'fix', [], [], [], 'C1', [] , [] , [] , [1185 205 0 100 40 1 0 0 0 0 0 1] , 'protein.generic');
  // m = pwAddX(m, 'C1PT' , 10, 'fix', [], [], [], 'C1', [] , [] , [] , [1085 85 0 100 40 1 0 0 0 0 0 1] , 'protein.generic');
  // m = pwAddX(m, 'AKTT' , 10, 'fix', [], [], [], 'C1', [] , [] , [] , [-25 -45 0 100 40 1 0 0 0 0 0 1] , 'protein.generic');
  // m = pwAddX(m, 'pERK' , 1, 'fix', 0, [], [], 'C1', [] , [] , [] , [-75 215 0 100 40 1 0 0 0 0 0 1] , 'protein.generic');
  // m = pwAddX(m, 'ERKT' , 50, 'fix', [], [], [], 'C1', [] , [] , [] , [-575 -245 0 100 40 1 0 0 0 0 0 1] , 'protein.generic');
  // m = pwAddX(m, 'XGa' , 0, 'fix', 0, [], [], 'C1', [] , [] , [] , [1565 -495 0 100 40 1 0 0 0 0 0 1] , 'protein.generic');
  // m = pwAddX(m, 'XGT' , 10, 'fix', [], [], [], 'C1', [] , [] , [] , [115 -355 0 100 40 1 0 0 0 0 0 1] , 'protein.generic');
  // m = pwAddX(m, 'NFkBa' , 0, 'fix', 0, [], [], 'C1', [] , [] , [] , [1375 -305 0 100 40 1 0 0 0 0 0 1] , 'protein.generic');
  // m = pwAddX(m, 'NFkBT' , 10, 'fix', [], [], [], 'C1', [] , [] , [] , [1065 -45 0 100 40 1 0 0 0 0 0 1] , 'protein.generic');
  // m = pwAddX(m, 'TNFR1a', 0, 'fix', 0, [], [], 'C1', [] , [] , [] , [2275 485 0 100 40 1 0 0 0 0 0 1] , 'protein.generic');
  // m = pwAddX(m, 'TNFR1T', 10, 'fix', [], [], [], 'C1', [] , [] , [] , [635 1025 0 100 40 1 0 0 0 0 0 1] , 'protein.generic');
  // m = pwAddX(m, 'PTENa' , 0, 'fix', 0, [], [], 'C1', [] , [] , [] , [705 -555 0 100 40 1 0 0 0 0 0 1] , 'protein.generic');
  // m = pwAddX(m, 'PTENT' , 10, 'fix', [], [], [], 'C1', [] , [] , [] , [735 -325 0 100 40 1 0 0 0 0 0 1] , 'protein.generic');
  // m = pwAddX(m, 'RAFa' , 0, 'fix', 0, [], [], 'C1', [] , [] , [] , [-95 -175 0 100 40 1 0 0 0 0 0 1] , 'protein.generic');
  // m = pwAddX(m, 'RAFT' , 10, 'fix', [], [], [], 'C1', [] , [] , [] , [-225 -35 0 100 40 1 0 0 0 0 0 1] , 'protein.generic');
  // m = pwAddX(m, 'PI3Ka' , 0, 'fix', 0, [], [], 'C1', [] , [] , [] , [-755 645 0 100 40 1 0 0 0 0 0 1] , 'protein.generic');
  // m = pwAddX(m, 'PI3KT' , 10, 'fix', [], [], [], 'C1', [] , [] , [] , [895 -405 0 100 40 1 0 0 0 0 0 1] , 'protein.generic');
  // m = pwAddX(m, 'Csps3a', 1, 'fix', 0, [], [], 'C1', [] , [] , [] , [1355 335 0 100 40 1 0 0 0 0 0 1] , 'protein.generic');
  // m = pwAddX(m, 'Csps3T', 10, 'fix', [], [], [], 'C1', [] , [] , [] , [-225 -245 0 100 40 1 0 0 0 0 0 1] , 'protein.generic');
  // m = pwAddX(m, 'TNF' , 6, 'fix', [], [], [], 'C1', [] , [] , [] , [1725 -195 0 100 40 1 0 0 0 0 0 1] , 'protein.generic');
  // m = pwAddX(m, 'INHBT1', 60, 'fix', 0, [], [], 'C1', [] , [] , [] , [] , 'protein.generic');
  // m = pwAddX(m, 'MEKK1a', 0, 'fix', 0, [], [], 'C1', [] , [] , [] , [] , 'protein.generic');
  // m = pwAddX(m, 'MEKK1T', 10, 'fix', [], [], [], 'C1', [] , [] , [] , [] , 'protein.generic');
  // m = pwAddX(m, 'ROSa' , 0, 'fix', 0, [], [], 'C1', [] , [] , [] , [] , 'protein.generic');
  // m = pwAddX(m, 'ROST' , 10, 'fix', [], [], [], 'C1', [] , [] , [] , [] , 'protein.generic');
  // m = pwAddX(m, 'CERa' , 0, 'fix', 0, [], [], 'C1', [] , [] , [] , [] , 'protein.generic');
  // m = pwAddX(m, 'CERT' , 10, 'fix', [], [], [], 'C1', [] , [] , [] , [] , 'protein.generic');
  // m = pwAddX(m, 'CAPPa' , 0, 'fix', 0, [], [], 'C1', [] , [] , [] , [] , 'protein.generic');
  // m = pwAddX(m, 'CAPPT' , 10, 'fix', [], [], [], 'C1', [] , [] , [] , [] , 'protein.generic');
  // m = pwAddX(m, 'Bcl2a' , 0, 'fix', 0, [], [], 'C1', [] , [] , [] , [] , 'protein.generic');
  // m = pwAddX(m, 'Bcl2T' , 10, 'fix', [], [], [], 'C1', [] , [] , [] , [] , 'protein.generic');
  // %% K - Dynamic parameters
  // % m = pwAddK(m, *ID, *value, fitSetting, minValue, maxValue, unit, name, description)
  // m = pwAddK(m, 'Kbxg' , 0.01, 'global', 0.0001, 10000);
  // m = pwAddK(m, 'Knaxp1' , 0.01, 'global', 0.0001, 10000);
  // m = pwAddK(m, 'Kbc1' , 0.01, 'global', 0.0001, 10000);
  // m = pwAddK(m, 'Kcac1' , 0.01, 'global', 0.0001, 10000);
  // m = pwAddK(m, 'Kcac2' , 0.01, 'global', 0.0001, 10000);
  // m = pwAddK(m, 'Kberk' , 0.01, 'global', 0.0001, 10000);
  // m = pwAddK(m, 'Kmae' , 0.01, 'global', 0.0001, 10000);
  // m = pwAddK(m, 'Kbpt' , 0.01, 'global', 0.0001, 10000);
  // m = pwAddK(m, 'Knip' , 0.01, 'global', 0.0001, 10000);
  // m = pwAddK(m, 'Kbnf' , 0.01, 'global', 0.0001, 10000);
  // m = pwAddK(m, 'Ktnf' , 0.01, 'global', 0.0001, 10000);
  // m = pwAddK(m, 'Kpin' , 0.01, 'global', 0.0001, 10000);
  // m = pwAddK(m, 'Kbp3k' , 0.01, 'global', 0.0001, 10000);
  // m = pwAddK(m, 'Ktpi1' , 0.01, 'global', 0.0001, 10000);
  // m = pwAddK(m, 'Kbdp3k' , 0.01, 'global', 0.0001, 10000);
  // m = pwAddK(m, 'Kbak' , 0.01, 'global', 0.0001, 10000);
  // m = pwAddK(m, 'Kpaak' , 0.01, 'global', 0.0001, 10000);
  // m = pwAddK(m, 'Kbdak' , 0.01, 'global', 0.0001, 10000);
  // m = pwAddK(m, 'Kbcs3' , 0.01, 'global', 0.0001, 10000);
  // m = pwAddK(m, 'Kjacs3' , 0.01, 'global', 0.0001, 10000);
  // m = pwAddK(m, 'Knics3' , 0.01, 'global', 0.0001, 10000);
  // m = pwAddK(m, 'Kaics3' , 0.01, 'global', 0.0001, 10000);
  // m = pwAddK(m, 'Keics3' , 0.01, 'global', 0.0001, 10000);
  // m = pwAddK(m, 'Ktnf2' , 0.01, 'global', 0.0001, 10000);
  // m = pwAddK(m, 'Kinhb' , 0.01, 'global', 0.0001, 10000);
  // m = pwAddK(m, 'Ktnf1' , 0.01, 'global', 0.0001, 10000);
  // m = pwAddK(m, 'Kbraf' , 0.01, 'global', 0.0001, 10000);
  // m = pwAddK(m, 'Kair' , 0.01, 'global', 0.0001, 10000);
  // m = pwAddK(m, 'Keir' , 0.01, 'global', 0.0001, 10000);
  // m = pwAddK(m, 'Kdjnk' , 0.01, 'global', 0.0001, 10000);
  // m = pwAddK(m, 'Kdbrk' , 0.01, 'global', 0.0001, 10000);
  // m = pwAddK(m, 'Kdbraf' , 0.01, 'global', 0.0001, 10000);
  // m = pwAddK(m, 'Kdbpt' , 0.01, 'global', 0.0001, 10000);
  // m = pwAddK(m, 'Kdbnf' , 0.01, 'global', 0.0001, 10000);
  // m = pwAddK(m, 'Kdbcs3' , 0.01, 'global', 0.0001, 10000);
  // m = pwAddK(m, 'Kbjnk' , 0.01, 'global', 0.0001, 10000);
  // m = pwAddK(m, 'Kxij' , 0.01, 'global', 0.0001, 10000);
  // m = pwAddK(m, 'Keij' , 0.01, 'global', 0.0001, 10000);
  // m = pwAddK(m, 'Kcajk' , 0.01, 'global', 0.0001, 10000);
  // m = pwAddK(m, 'Kpaer' , 0.01, 'global', 0.0001, 10000);
  // m = pwAddK(m, 'Keic1' , 0.01, 'global', 0.0001, 10000);
  // m = pwAddK(m, 'Keic2' , 0.01, 'global', 0.0001, 10000);
  // m = pwAddK(m, 'Keij1' , 0.01, 'global', 0.0001, 10000);
  // m = pwAddK(m, 'Keij2' , 0.01, 'global', 0.0001, 10000);
  // m = pwAddK(m, 'Ktacs' , 0.01, 'global', 0.0001, 10000);
  // m = pwAddK(m, 'Kdxg' , 0.01, 'global', 0.0001, 10000);
  // m = pwAddK(m, 'Kjae' , 0.01, 'global', 0.0001, 10000);
  // m = pwAddK(m, 'Ktnar' , 0.01, 'global', 0.0001, 10000);
  // m = pwAddK(m, 'Kjan' , 0.01, 'global', 0.0001, 10000);
  // m = pwAddK(m, 'Kpip3' , 0.01, 'global', 0.0001, 10000);
  // m = pwAddK(m, 'n1' , 0.01, 'global', 0.0001, 10000);
  // m = pwAddK(m, 'Kbmkk1' , 0.01, 'global', 0.0001, 10000);
  // m = pwAddK(m, 'Ktamkk1', 0.01, 'global', 0.0001, 10000);
  // m = pwAddK(m, 'Kdmkk1' , 0.01, 'global', 0.0001, 10000);
  // m = pwAddK(m, 'Krakk4' , 0.01, 'global', 0.0001, 10000);
  // m = pwAddK(m, 'Kaikk4' , 0.01, 'global', 0.0001, 10000);
  // m = pwAddK(m, 'Kmk4aj' , 0.01, 'global', 0.0001, 10000);
  // m = pwAddK(m, 'Kjaa' , 0.01, 'global', 0.0001, 10000);
  // m = pwAddK(m, 'Kjar' , 0.01, 'global', 0.0001, 10000);
  // m = pwAddK(m, 'Kdros' , 0.01, 'global', 0.0001, 10000);
  // m = pwAddK(m, 'Kbros' , 0.01, 'global', 0.0001, 10000);
  // m = pwAddK(m, 'Kbcer' , 0.01, 'global', 0.0001, 10000);
  // m = pwAddK(m, 'Ktcr' , 0.01, 'global', 0.0001, 10000);
  // m = pwAddK(m, 'Kdcer' , 0.01, 'global', 0.0001, 10000);
  // m = pwAddK(m, 'kpicr' , 0.01, 'global', 0.0001, 10000);
  // m = pwAddK(m, 'Kbcpp' , 0.01, 'global', 0.0001, 10000);
  // m = pwAddK(m, 'Kacp' , 0.01, 'global', 0.0001, 10000);
  // m = pwAddK(m, 'Kdcpp' , 0.01, 'global', 0.0001, 10000);
  // m = pwAddK(m, 'Kcpia' , 0.01, 'global', 0.0001, 10000);
  // m = pwAddK(m, 'Kbx' , 0.01, 'global', 0.0001, 10000);
  // m = pwAddK(m, 'Knix' , 2 , 'global', 1 , 10000);
  // m = pwAddK(m, 'Kdx' , 0.01, 'global', 0.0001, 10000);
  // m = pwAddK(m, 'Kxaa' , 0.01, 'global', 0.0001, 10000);
  // m = pwAddK(m, 'Kaic1' , 0.01, 'global', 0.0001, 10000);
  // m = pwAddK(m, 'Kaic2' , 0.01, 'global', 0.0001, 10000);
  // m = pwAddK(m, 'kn2' , 2 , 'global', 1 , 10000);
  // m = pwAddK(m, 'Kjac2' , 0.01, 'global', 0.0001, 10000);
  // m = pwAddK(m, 'Kbase' , 0.1 , 'global', 0.0001, 10000);
  // %% R - Reactions
  // % m = pwAddR(m, *ID, *reactants, *products, *modifiers, *type, *options, *rateSignature, *parameters, description, name, fast, compartments, parameterTrunks, designerPropsR, stoichiometry, reversible)
  // m = pwAddR(m, 'R01', { }, {'pJNK' }, {'JNK','C1Pa','XGa','pERK','MEKK1a' }, 'C' , [] , 'k1*m1 + k2*m1*m2 - (k3*p1*m3) - (k4*m4*p1)/(k5+k6*m4) - k7*p1 + (k8*m1*m5)' , {'Kbjnk','Kcajk','Kxij','Keij','Keij1','Keij2','Kdjnk','Kmk4aj'}, [], [], [], {}, {}, {[], [], [1 0 0 0 1.8 1 1 1], [1 0.9 0.1 0.1 1.8 1 4 1;1 0.9 0.1 0.1 1.8 1 4 1;1 0.9 0.1 0.1 1.8 1 4 1;1 0.9 0.1 0.1 1.8 1 4 1;1 0.9 0.1 0.1 1.8 1 4 1]});
  // m = pwAddR(m, 'R02', { }, {'XGa' }, {'NFkBa','XG' }, 'C' , [] , 'k1*m2+ k2*m1*m2 - k3*p1' , {'Kbxg','Knaxp1','Kdxg'}, [], [], [], {}, {}, {[], [], [1 0 0 0 1.8 1 1 1], [1 0.9 0.1 0.1 1.8 1 4 1;1 0.9 0.1 0.1 1.8 1 4 1]});
  // m = pwAddR(m, 'R03', { }, {'C1Pa' }, {'C1P','CERa' }, 'C' , [] , 'k1*m1 + k2*m1*m2 - k3*p1 ' , {'Kbc1','Kcac1','Kcac2'}, [], [], [], {}, {}, {[], [], [1 0 0 0 1.8 1 1 1], [1 0.9 0.1 0.1 1.8 1 4 1;1 0.9 0.1 0.1 1.8 1 4 1]});
  // m = pwAddR(m, 'R04', { }, {'pERK' }, {'ERK','RAFa','pJNK','PI3Ka' }, 'C' , [] , 'k1*m1 + k2*m1*m2 + k3*m1*m3 + k4*m4*m1 - k5*p1' , {'Kberk','Kmae','Kjae','Kpaer','Kdbrk'}, [], [], [], {}, {}, {[], [], [1 0 0 0 1.8 1 1 1], [1 0.9 0.1 0.1 1.8 1 4 1;1 0.9 0.1 0.1 1.8 1 4 1;1 0.9 0.1 0.1 1.8 1 4 1;1 0.9 0.1 0.1 1.8 1 4 1;1 0.9 0.1 0.1 1.8 1 4 1]});
  // m = pwAddR(m, 'R05', { }, {'RAFa' }, {'RAF','TNFR1a','pAKT','pERK' }, 'C' , [] , 'k1*m1 + k2*m1*m2 - k3*m3*p1 - k4*m4*p1 - k5*p1' , {'Kbraf','Ktnar','Kair','Keir','Kdbraf'}, [], [], [], {}, {}, {[], [], [1 0 0 0 1.8 1 1 1], [1 0.9 0.1 0.1 1.8 1 4 1;1 0.9 0.1 0.1 1.8 1 4 1]});
  // m = pwAddR(m, 'R06', { }, {'NFkBa' }, {'NFkB','PTENa','TNFR1a','INHBT1','pJNK' }, 'C' , [] , '(k1*m1)/(1+k4*m4) + (k2*m1*m3)/(1+k4*m4)- k3*m2*p1 - k5*p1 + (k6*m5*m1)' , {'Kbnf','Ktnf','Kpin','Kinhb','Kdbnf','Kjan'}, [], [], [], {}, {}, {[], [], [1 0 0 0 1.8 1 1 1], [1 0.9 0.1 0.1 1.8 1 4 1;1 0.9 0.1 0.1 1.8 1 4 1;1 0.9 0.1 0.1 1.8 1 4 1]});
  // m = pwAddR(m, 'R07', { }, {'PI3Ka' }, {'PI3K','TNFR1a','PTENa' }, 'C' , [] , 'k1*m1 + (k2*m1*m2) - k3*m3*p1-k4*p1' , {'Kbp3k','Ktpi1','Kpip3','Kbdp3k'}, [], [], [], {}, {}, {[], [], [1 0 0 0 1.8 1 1 1], [1 0.9 0.1 0.1 1.8 1 4 1;1 0.9 0.1 0.1 1.8 1 4 1]});
  // m = pwAddR(m, 'R08', { }, {'pAKT' }, {'PI3Ka','AKT','pJNK','CAPPa','Bcl2a' }, 'C' , [] , 'k1*m2 + k2*m1*m2 - k3*p1 + k4*m2*m3 - k5*m4*p1 + k6*m2*m5' , {'Kbak','Kpaak','Kbdak','Kjaa','Kcpia','Kxaa'}, [], [], [], {}, {}, {[], [], [1 0 0 0 1.8 1 1 1], [1 0.9 0.1 0.1 1.8 1 4 1;1 0.9 0.1 0.1 1.8 1 4 1;1 0.9 0.1 0.1 1.8 1 4 1]});
  // m = pwAddR(m, 'R09', { }, {'TNFR1a'}, {'TNFR1','TNF' }, 'C' , [] , 'k3 + k1*m1*m2 - k2*p1' , {'Ktnf1','Ktnf2','Kbase'}, [], [], [], {}, {}, {[1535 -175], [], [1 0 0 0 1.8 1 1 1], [1 0.9 0.1 0.1 1.8 1 4 1;1 0.9 0.1 0.1 1.8 1 4 1]});
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
  // Compartments:
  compartment C1 = 1;

  // Species:
  species pJNK in C1 = 1;
  species C1Pa in C1 = 0;
  species pAKT in C1 = 1;
  species JNKT in C1 = 10;
  species C1PT in C1 = 10;
  species AKTT in C1 = 10;
  species pERK in C1 = 1;
  species ERKT in C1 = 50;
  species XGa in C1 = 0;
  species XGT in C1 = 10;
  species NFkBa in C1 = 0;
  species NFkBT in C1 = 10;
  species TNFR1a in C1 = 0;
  species TNFR1T in C1 = 10;
  species PTENa in C1 = 0;
  species PTENT in C1 = 10;
  species RAFa in C1 = 0;
  species RAFT in C1 = 10;
  species PI3Ka in C1 = 0;
  species PI3KT in C1 = 10;
  species Csps3a in C1 = 1;
  species Csps3T in C1 = 10;
  species TNF in C1 = 6;
  species INHBT1 in C1 = 60;
  species MEKK1a in C1 = 0;
  species MEKK1T in C1 = 10;
  species ROSa in C1 = 0;
  species ROST in C1 = 10;
  species CERa in C1 = 0;
  species CERT in C1 = 10;
  species CAPPa in C1 = 0;
  species CAPPT in C1 = 10;
  species Bcl2a in C1 = 0;
  species Bcl2T in C1 = 10;
  species FC_pJNK in C1;
  species FC_pAKT in C1;
  species FC_Csps3 in C1;

  // Parameters:
  Kbxg = 0.01;
  Knaxp1 = 0.01;
  Kbc1 = 0.01;
  Kcac1 = 0.01;
  Kcac2 = 0.01;
  Kberk = 0.01;
  Kmae = 0.01;
  Kbpt = 0.01;
  Knip = 0.01;
  Kbnf = 0.01;
  Ktnf = 0.01;
  Kpin = 0.01;
  Kbp3k = 0.01;
  Ktpi1 = 0.01;
  Kbdp3k = 0.01;
  Kbak = 0.01;
  Kpaak = 0.01;
  Kbdak = 0.01;
  Kbcs3 = 0.01;
  Kjacs3 = 0.01;
  Knics3 = 0.01;
  Kaics3 = 0.01;
  Keics3 = 0.01;
  Ktnf2 = 0.01;
  Kinhb = 0.01;
  Ktnf1 = 0.01;
  Kbraf = 0.01;
  Kair = 0.01;
  Keir = 0.01;
  Kdjnk = 0.01;
  Kdbrk = 0.01;
  Kdbraf = 0.01;
  Kdbpt = 0.01;
  Kdbnf = 0.01;
  Kdbcs3 = 0.01;
  Kbjnk = 0.01;
  Kxij = 0.01;
  Keij = 0.01;
  Kcajk = 0.01;
  Kpaer = 0.01;
  Keic1 = 0.01;
  Keic2 = 0.01;
  Keij1 = 0.01;
  Keij2 = 0.01;
  Ktacs = 0.01;
  Kdxg = 0.01;
  Kjae = 0.01;
  Ktnar = 0.01;
  Kjan = 0.01;
  Kpip3 = 0.01;
  n1 = 0.01;
  Kbmkk1 = 0.01;
  Ktamkk1 = 0.01;
  Kdmkk1 = 0.01;
  Krakk4 = 0.01;
  Kaikk4 = 0.01;
  Kmk4aj = 0.01;
  Kjaa = 0.01;
  Kjar = 0.01;
  Kdros = 0.01;
  Kbros = 0.01;
  Kbcer = 0.01;
  Ktcr = 0.01;
  Kdcer = 0.01;
  kpicr = 0.01;
  Kbcpp = 0.01;
  Kacp = 0.01;
  Kdcpp = 0.01;
  Kcpia = 0.01;
  Kbx = 0.01;
  Knix = 2;
  Kdx = 0.01;
  Kxaa = 0.01;
  Kaic1 = 0.01;
  Kaic2 = 0.01;
  kn2 = 2;
  Kjac2 = 0.01;
  Kbase = 0.1;
  s = 0.1;
  s1 = 0.1;
  s2 = 0.1;

  // Assignment rules:
  JNK := JNKT - pJNK;
  AKT := AKTT - pAKT;
  ERK := ERKT - pERK;
  XG := XGT - XGa;
  NFkB := NFkBT - NFkBa;
  C1P := C1PT - C1Pa;
  RAF := RAFT - RAFa;
  PTEN := PTENT - PTENa;
  PI3K := PI3KT - PI3Ka;
  Csps3 := Csps3T - Csps3a;
  TNFR1 := TNFR1T - TNFR1a;
  basal_JNK := Kbjnk*JNKT/(Kbjnk + Kdjnk);
  basal_AKT := Kbak*AKTT/(Kbak + Kbdak);
  basal_Csps3 := Kbcs3*Csps3T/(Kbcs3 + Kdbcs3);
  MEKK1 := MEKK1T - MEKK1a;
  ROS := ROST - ROSa;
  CER := CERT - CERa;
  CAPP := CAPPT - CAPPa;
  Bcl2i := Bcl2T - Bcl2a;
  FC_pJNK := s*(pJNK/basal_JNK);
  FC_pAKT := s1*(pAKT/basal_AKT);
  FC_Csps3 := s2*(Csps3a/basal_Csps3);

  // Reactions:
  reaction_1: -> pJNK; (Kbjnk*JNK + Kcajk*JNK*C1Pa - Kxij*pJNK*XGa - Keij*pERK*pJNK/(Keij1 + Keij2*pERK) - Kdjnk*pJNK + Kmk4aj*JNK*MEKK1a)*C1;  // modifiers: JNK, C1Pa, XGa, pERK, MEKK1a
  reaction_2: -> XGa; (Kbxg*XG + Knaxp1*NFkBa*XG - Kdxg*XGa)*C1;  // modifiers: NFkBa, XG
  reaction_3: -> C1Pa; (Kbc1*C1P + Kcac1*C1P*CERa - Kcac2*C1Pa)*C1;  // modifiers: C1P, CERa
  reaction_4: -> pERK; (Kberk*ERK + Kmae*ERK*RAFa + Kjae*ERK*pJNK + Kpaer*PI3Ka*ERK - Kdbrk*pERK)*C1;  // modifiers: ERK, RAFa, pJNK, PI3Ka
  reaction_5: -> RAFa; (Kbraf*RAF + Ktnar*RAF*TNFR1a - Kair*pAKT*RAFa - Keir*pERK*RAFa - Kdbraf*RAFa)*C1;  // modifiers: RAF, TNFR1a, pAKT, pERK
  reaction_6: -> NFkBa; (Kbnf*NFkB/(1 + Kinhb*INHBT1) + Ktnf*NFkB*TNFR1a/(1 + Kinhb*INHBT1) - Kpin*PTENa*NFkBa - Kdbnf*NFkBa + Kjan*pJNK*NFkB)*C1;  // modifiers: NFkB, PTENa, TNFR1a, INHBT1, pJNK
  reaction_7: -> PI3Ka; (Kbp3k*PI3K + Ktpi1*PI3K*TNFR1a - Kpip3*PTENa*PI3Ka - Kbdp3k*PI3Ka)*C1;  // modifiers: PI3K, TNFR1a, PTENa
  reaction_8: -> pAKT; (Kbak*AKT + Kpaak*PI3Ka*AKT - Kbdak*pAKT + Kjaa*AKT*pJNK - Kcpia*CAPPa*pAKT + Kxaa*AKT*Bcl2a)*C1;  // modifiers: PI3Ka, AKT, pJNK, CAPPa, Bcl2a
  reaction_9: -> TNFR1a; (Kbase + Ktnf1*TNFR1*TNF - Ktnf2*TNFR1a)*C1;  // modifiers: TNFR1, TNF
  reaction_10: -> MEKK1a; (Kbmkk1*MEKK1 + Ktamkk1*MEKK1*TNFR1a - Kdmkk1*MEKK1a + Krakk4*MEKK1*ROSa - Kaikk4*pAKT*MEKK1a)*C1;  // modifiers: MEKK1, TNFR1a, ROSa, pAKT
  reaction_11: -> ROSa; (Kbros*ROS + Kjar*ROS*pJNK - Kdros*ROSa)*C1;  // modifiers: ROS, pJNK
  reaction_12: -> PTENa; (Kbpt*PTEN - Knip*NFkBa*PTENa - Kdbpt*PTENa)*C1;  // modifiers: PTEN, NFkBa
  reaction_13: -> Csps3a; (Kbcs3*Csps3 + Kjacs3*Csps3*pJNK/(Kjac2 + n1*pJNK) - Knics3*NFkBa*Csps3a - Kaics3*Csps3a*pAKT^kn2/(Kaic1 + Kaic2*pAKT^kn2) - Keics3*pERK*Csps3a/(Keic1 + Keic2*pERK) - Kdbcs3*Csps3a + Ktacs*TNFR1a*Csps3)*C1;  // modifiers: Csps3, pJNK, NFkBa, pAKT, pERK, TNFR1a
  reaction_14: -> CERa; (Kbcer*CER + Ktcr*CER*TNFR1a - Kdcer*CERa - kpicr*PI3Ka*CERa)*C1;  // modifiers: CER, TNFR1a, PI3Ka
  reaction_15: -> CAPPa; (Kbcpp*CAPP + Kacp*CAPP*CERa - Kdcpp*CAPPa)*C1;  // modifiers: CAPP, CERa
  reaction_16: -> Bcl2a; (Kbx*Bcl2i - Knix*NFkBa*Bcl2a - Kdx*Bcl2a)*C1;  // modifiers: Bcl2i, NFkBa
end
